## Fundamental constants and equations
c := 2.988*10^8  # m/s
# speed of light
β(γ) := sqrt(1 - 1/γ^2)
m_p := 0.938*10^9  # eV  # proton mass
## Ring and Beam parameters
# Ring | RF | 40 RF Station each 10kV | Experement
C_ring := 1483.699  # m
# Acc Lenght
V_max := 400  # kV
45
190 - 300
E_exp := 69*10^9  # eV  # Energy of Experiment
ρ := 194.125
# curvature
h := 30  # harmonic number
Bρ := 233  # Txm
# 6.87–233
φ_acc := 30
3.225
E_inj := 1.32*10^9  # eV  # Injection Energy
eV
E_inj := 270*10^6  # eV
α_0_st := 0.011120
U := V_max*sin(φ_acc*π/180)*10^3 = 200000  # Accelerating Voltage
α_0 := 0.011120  # MCFs
α_1 := 0.0
α_2 := 0.0
# Energy, eV
# Gamma
# Momentum, eV/c
γ_tr := 1/sqrt(α_0) = 9.48304
β(γ_tr) = 0.994424  # Transition Energy
# Kin. Energy, | eV | Gamma | Momentum, | eV/c | Total Energy, | eV
E_kin(n) := U*n + E_inj
γ(n) := E_kin(n)/m_p + 1
p(n) := sqrt((E_kin(n) + m_p)^2 - m_p^2)
E_beam(n) := sqrt((E_kin(n) + m_p)^2)
E_kin(0) = 270000000  # eV
γ(0) = 1.28785
p(0) = 761196427
E_beam(0) = 1208000000
E_kin(40000) = 8.27e9  # eV
γ(40000) = 9.81663
E_beam(40000) = 9208000000
p(40000) = 9.1601e9
n_tr := ((γ_tr - 1)*m_p - E_inj)/U = 38435.5
n_exp := (E_exp - E_inj)/U = 343650
E_kin(n_tr) = 7.95709e9
γ(n_tr) = 9.48304
p(n_tr) = 8.8455e9
E_beam(n_tr) = 8.89509e9
E_kin(n_exp) = 69000000000
γ(n_exp) = 74.5608
p(n_exp) = 6.99317e10
E_beam(n_exp) = 69938000000
T_s := C_ring/(β(γ_tr)*c) = 4.99337e-6  # c
## Transition JUMP
Δγ_tr := 0.9
# Here is a 4 different states of longitudinal
# optics based on transition energy:
# 1) acceleration from injection energy with initial value;
# 2) smooth increase to peak
# 3) jump
# 4) initial value till the experiment energy
#
# 1.First defines 3) state based on the maximum availiable
# speed of transition shift and availiable transition size
# 2.Secondly, we can understand states 3
# 3.Finally, states 3 and 5 also can be understand
Q := 9.9
γ1 := E_inj/m_p + 1 = 1.28785
γ2 := (E_inj + U)/m_p + 1 = 1.28806
dγdt_acc := 30  # 1/c
dγdt := 100
γ_p := (γ2 - γ1)/T_s = 42.7006  # длительность процедуры
1/T_s = 200266
36
T_s = 4.99337e-6  # милисекунд
1
Δn := n_tr - ((γ_tr - Δγ_tr - 1)*m_p - E_inj)/U = 4221  # Kin. Energy,  # eV  # Gamma
# Momentum,
# eV/c
# Total Energy,
eV
γ(n_tr) = 9.48304
Δn_jump := Δγ_tr/(T_s*dγdt) = 1802.39
E_kin(n_tr) = 7.95709e9  # eV
γ(n_tr) = 9.48304
p(n_tr) = 8.8455e9
E_beam(n_tr) = 8.89509e9
γ(n_tr - Δn) = 8.58304
γ_tr + Δγ_tr = 10.383
E_kin(n_tr - Δn) = 7.11289e9  # eV
γ(n_tr - Δn) = 8.58304
p(n_tr - Δn) = 7.99606e9
E_beam(n_tr - Δn) = 8.05089e9
E_kin(n_tr - Δn)*(10^-9*10^2) = 711.289
T_s*dγdt*Δn_jump = 0.9
E_kin(n_tr + Δn) = 8.80129e9  # eV
γ(n_tr + Δn) = 10.383
p(n_tr + Δn) = 9.69402e9
E_beam(n_tr + Δn) = 9.73929e9
T_s*Δn_jump*10^3 = 9  # ms
γ(n_tr - Δn_jump/2)*100 = 929.089
E_kin(n_tr + Δn) - E_kin(n_tr - Δn) = 1.6884e9  # eV
# (84 MeV in)
2*Δn = 8442  # turns
T_s*dγdt_acc*Δn*10^3 = 632.31
E_kin(n_tr - Δn_jump/2) = 7.77685e9  # eV
γ(n_tr - Δn_jump/2) = 9.29089
p(n_tr - Δn_jump/2) = 8.66423e9
E_beam(n_tr - Δn_jump/2) = 8.71485e9
Δt_21 := 36*10^-3
E_kin(n_tr - Δn_jump/2)*10^-9*10^2 = 777.685
Δt_32 := 1*10^-3
E_kin(n_tr + Δn_jump/2) = 8.13733e9  # eV
γ(n_tr + Δn_jump/2) = 9.67519
p(n_tr + Δn_jump/2) = 9.02673e9
E_beam(n_tr + Δn_jump/2) = 9.07533e9
E_kin(n_tr + Δn_jump/2)*10^-9*10^2 = 813.733
Δt_41 := 27*10^-3
E_kin(n_tr + Δn_jump/2) - E_kin(n_tr - Δn_jump/2) = 360478271  # eV
# (1.8 MeV in)
2*Δn_jump/2 = 1802.39  # turns
Δn_21 := Δt_21/T_s = 7209.57
Δn_32 := Δt_32/T_s = 200.266
Δn_41 := Δt_41/T_s = 5407.17
t_1 := 0*10^-3
Δn_21/10 = 720.957
# частота RF на 290 ms
n_1 := t_1/T_s = 0
6.022023*10^6
T_s*Δn_21*10^3 = 36
γ_jump(n) := Δγ_tr/Δn_32*(n - n_1 - 1*Δn_21 - Δn_32/2) + γ_tr
30/(6.022023*10^6) = 4.98171e-6
Δγ := 0.9
sqrt(1/(1 - (C_ring/(30/(6.022023*10^6)*c))^2)) = 12.4141
C_ring/(30/(6.022023*10^6)*c) = 0.99675
γ_inc(n) := Δγ_tr/Δn_21*(n - n_1) + γ_tr
C_ring/(β(γ(n_1))*c) = 7.88017e-6
γ_tran(n) := γ_tr*(n ≤ n_1) + γ_inc(n)*(n_1 < n ≤ n_1 + Δn_21) + γ_tr*(n_1 + Δn_21 < n < n_1 + Δn_21 + Δn_32) + γ_tr*(n ≥ n_1 + Δn_21 + Δn_32)
α_0(n) := 1/γ_tran(n)^2
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γ_tran(n_1 + Δn_21) = 10.383
γ_tran(n_1 + Δn_21) - γ_tr = 0.9
α_0(n_1 + Δn_21) = 0.00927579
γ(n_1) = 1.28785
E_kin(n_1) = 270000000
α_0(n_1)*1000 = 11.12
γ(n_1 + Δn_21) = 2.82507
E_kin(n_1 + Δn_21) = 1.71191e9
α_0(n_1 + Δn_21)*100000 = 927.579
γ(n_1 + Δn_21 + Δn_32/2) = 2.84642
E_kin(n_1 + Δn_21 + Δn_32) = 1.75197e9
α_0(n_1 + Δn_21 + Δn_32)*1000 = 11.12
n_2 := n_1 + Δn_21
(α_0(n_1) - α_0(n_1 + Δn_21)) = 0.00184421
n_3 := n_1 + Δn_21 + Δn_32
0.01120 - 0.00927578 = 0.00192422
n_4 := n_1 + Δn_41
Δγ_tr/2*m_p*4/((n_2 + n_3)/2 - n_4) = 887453
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(n_tr - n_1)*T_s*1000 = 191.922
n_tr*T_s = 0.191922
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## Threashold curent
m_0 := 1.67*10^-27  # kg
c = 298800000  # m/s
e := 1.602*10^-19
γ_tr := 9.483
β(γ_tr) = 0.994424
h := 30
σ_p := 6*10^-3
η := 1*10^-3
N_p := 2.0*10^13
Z_imp := 10
I_th := 2*π*m_0*c^2*β(γ_tr)^2*γ_tr*η*σ_p^2/(e*Z_imp) = 197.418  # A
(e*N_p)/(T_s/(2*π)) = 4.03161
e*0.988*c*N_p/I_th = 4.79119
I_th/(h*e)*T_s = 2.05115e14
## Relevant Times
# Beam Params | Ring Params | RF Params | Experem Params
A := 1
Z := 1
C := 1483.699
h := 30
E_inj := 5.66  # GeV
m_0 := 1.67*10^-27  # kg
V := 40*10*10^3
V - amplitude
R_0 := C/(2*π) = 236.138
E_tr := 7.957  # GeV
m_0eV := 0.938
φ_s := 30*π/180
# GeV
γ_t := 9.483
c = 298800000  # m/s  # m
E_tr - E_inj = 2.297  # Harmonic 10kV
α_1 := 0.01
V*|sin(φ_s)| = 200000  # eV per turn
e := 1.6*10^-19
(E_tr - E_inj)*10^9/(V*|sin(φ_s)|) = 11485  # increase
T_s*10^3*7200 = 35.9522  # ms
δ := 10*10^-3
# jump
T_s*10^3*200 = 0.998673  # ms
β_s := β(γ_tr) = 0.994424
ω_0 := β_s*c/R_0 = 1258306
T_s := (2*π/ω_0) = 4.99337e-6  # s
γ1 := E_inj/m_0eV + 1 = 7.03412
γ2 := (E_inj + (V*|sin(φ_s)|)/10^9)/m_0eV + 1 = 7.03433
γ_p := (γ2 - γ1)/T_s = 42.7006
# Adiabatic Time
T_ad := (π*β_s^2*m_0*c^2*γ_t^4/(γ_p*ω_0^2*h*e*V*|cos(φ_s)|))^(1/3) = 0.0032179  # s
T_ad*10^3 = 3.2179  # ms
4*T_ad*10^3 = 12.8716  # ms
Δγ_t := 2*γ_p*T_ad = 0.274812
T_ad/T_s = 644.434
V*|sin(φ_s)|*10^-9*T_ad/T_s = 0.128887  # GeV
# Non-linear time
T_nl := (3/2*β_s^2 + α_1*γ_t^2)*δ*γ_t/(2*γ_p) = 0.00264565  # s
T_nl*10^3 = 2.64565  # ms
Δγ_t := 2*γ_p*T_nl = 0.225941
T_nl/T_s = 529.832
G := e^(2/3*(T_nl/T_ad)^(3/2)) = 4.55631e-10
## Phase Space
(1*10^7)/(7.957*10^9)*10^3 = 1.25676  # x 10^(-3)
1*10^7*20*10^-9 = 0.2
sqrt((400000*7.0*10^9*0.9997^2*(cos(ω_0*30*20*10^-9) - 1))/(π*30*(-3.2*10^-3 + 0.01*6*10^-3))) = 50688222
(0.6*10^3*10^-9)*4/(4*30) = 2e-8
sqrt((400000*7.0*10^9*0.9997^2*(cos(ω_0*30*2*10^-8) - 1))/(π*30*(-3.2)*10^-3))/(7.9*10^9) = 0.00635579
1.9*10^-7 - 1.7*10^-7 = 2e-8
5.0*10^7*(2*10^-8) = 1
3.14159*20/2*10^-9*50*10^6 = 1.5708
## Experemetal bunch length
# милисекунды | наносекунды
t_bunch1 := [10; 100; 200; 290; 310; 326; 329; 331; 600; 600]
L_bunch1 := [75; 66; 43; 18; 16; 15; 14.5; 14; 25; 25]
t_bunch := [200; 200; 200; 290; 310; 326; 329; 331; 600; 600]
L_bunch := [43; 43; 43; 18; 16; 15; 14.5; 14; 25; 25]
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## RF Separatrix and Synchrotron frequancy
η_0(n) := α_0_st - 1/γ(n)^2
φ_s := -1*π/3 = -1.0472
V_amp := 40*10000
η_0(n_tr) = 1.73472e-18
γ(n_tr) = 9.48304
E_kin(n_tr) = 7.95709e9
T_ad = 0.0032179
n_ad := T_ad/T_s = 644.434
n_nl := T_nl/T_s = 529.832
ΔE_sep(n, φ) := sqrt(2*β(γ(n))^2*E_kin(n)*V_amp/(2*π*h*η_0(n))*(cos(π - φ_s) - cos(φ_s) + (π - φ_s - φ)*sin(φ_s)))
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ω_0 = 1258306
ν_s0(n) := sqrt(-h*V_amp*η_0(n)*cos(φ_s)/(2*π*β(γ(n))^2*E_kin(n)))
ω_s0(n) := ν_s0(n)*ω_0
ν_s0(n_tr - n_ad) = 0.00020161
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φ_s := -1*π/3
γ_tp := V_amp*ω_0*|sin(φ_s)|/(2*π*m_p) = 73.9596
ω_inf := ω_0/β(n_tr) = 1258306
T_c := (β(n_tr)*γ_tr^4/(2*ω_inf*h)*(|tan(φ_s)|/γ_tp^2))^(1/3) = 0.00323697
n_c := T_c/T_s = 648.255
ω_s := ω_inf*sqrt(h*γ_tp*T_c*V_amp*cos(φ_s)/(π*γ_tr^4*m_p)) = 308.931
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C/(β(n_tr)*c) = 4.96553e-6
ν_s0(n_tr - n_ad) = 0.00020161
σ_ΔE := 0.8*10^8
σ_ϕ := σ_ΔE/ν_s0(n_tr - 1*n_ad)*h*|η_0(n_tr - 1*n_ad)|/(β(n_tr)^2*γ_tr*m_p) = 0.440823
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σ_ϕ/(h*ω_0) = 1.16777e-8
## High-order slip-factor
η_1(n) := 3/2*β(n)^2/γ(n)^2 + α_1*α_0_st - η_0(n)/γ(n)^2
φ_s := π/3
η_1(n) := 3/2*β(n)^2/γ(n)^2 + α_1 - α_0_st*η_0(n)
k_1 := (6*V_amp/(π*β(n_tr)^2*h*η_0(n_tr - n_ad)*E_kin(n_tr))*((π/2 - φ_s)*sin(φ_s) - cos(φ_s)))^(1/2) = 0.0212666
η_0(n_tr - n_ad) = -0.000329392
(0.56*10^8)/(5.7*10^9) = 0.00982456
η_1(n_tr - n_ad) = 0.0271778
|η_0(n_tr - n_ad)/η_1(n_tr - n_ad)| = 0.0121199
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η_1_eq := η_0(n_tr - n_ad)/k_1 = -0.0154887
ϕ := (|η_0(n_tr - n_ad)|^(3/2)/η_1(n_tr - n_ad))*(2*π*β(n_tr)^2*h*E_kin(n_tr)/(3*V_amp*cos(φ_s)))^(1/2) = 0.347782
A := 6/5*((|η_0(n_tr - n_ad)|^(5/2)/η_1(n_tr - n_ad)^2)*(2*π*β(n_tr)^2*h*E_kin(n_tr)/(V_amp*cos(φ_s)))^(1/2)) = 0.00876089
# [component: outputs PS]
rows(PS) =  # error: Эта переменная не определена.
cols(PS) =  # error
i := 0 .. rows(PS) - 1
n_turn[i] := PS[i, 0]
τ[i] := PS[i, 1]
ΔE[i] := PS[i, 2]
dpp[i] := PS[i, 3]
E[i] := PS[i, 6]
24.95 + 3.6 + 5.4 + 4.3 + 19.75 + 19.75 + 16.9 + 19.89 + 6.9 + 8.74 + 5.4 + 7.74 + 5.4 + 7.74 + 16.45 + 6.45 + 6.45 + 4.5 + 7.74 + 7.74 + 3.0 + 4.5 + 4.5 = 217.79
231.63 + 42.34 + 7.5 = 281.47
(231.63 + 42.34 + 7.5)*1.5 = 422.205
